# OpenSim document version 40000
AnalyzeTool 3-segment_foot_model_fixed_knee_axis:
  model_file: C:\Users\lingh\OneDrive - KTH\ExMaterials\7-Doctor\Research\2-simulation\Subjects\DHondt_2023_3seg\DHondt_2023_3seg.osim
  replace_force_set: false
  results_directory: C:\Users\lingh\OneDrive - KTH\ExMaterials\7-Doctor\Research\2-simulation\PredSimResults\DHondt_2023_3seg_0.1strengthMS_test_back\_0hipAssistance
  output_precision: 8
  initial_time: 0
  final_time: 2.285744
  solve_for_equilibrium_for_auxiliary_states: false
  maximum_number_of_integrator_steps: 20000
  maximum_integrator_step_size: 1
  minimum_integrator_step_size: 1e-8
  integrator_error_tolerance: 1e-5
  coordinates_file: C:\Users\lingh\OneDrive - KTH\ExMaterials\7-Doctor\Research\2-simulation\PredSimResults\DHondt_2023_3seg_0.1strengthMS_test_back\_0hipAssistance\DHondt_2023_3seg_v1.mot
  lowpass_cutoff_frequency_for_coordinates: -1
  AnalysisSet Analyses:
    PointKinematics: start_time=0 end_time=2.285744 step_interval=1 in_degrees=true body_name=toes_l
        relative_to_body_name=ground point_name=footclearance point=(0.014239 0.0220445 -0.00295239)
